OpenVSP model (file version 4), 11 components.
Geometry view with OpenVSP parameter names; values to 6 digits, angles in degrees, lengths in the model's unit.
Overall bounding box: X_Min=0 X_Len=164.833 Y_Min=-100 Y_Len=200 Z_Min=-15 Z_Len=65.8696

Fuselage "FuselageGeom"
  location (X Y Z) 0 0 0, rotation 0 0 0
  bounding box size 162.058 20 30
  Design: Length=160
  cross sections:
    n  XLocPercent  YLocPercent  ZLocPercent  shape
    0  0            0            -0.05        point
    1  0.0815217    0            -0.0416667   rounded rectangle RoundRectXSec_Radius=0.075 RoundedRect_Height=15 RoundedRect_Width=20
    2  0.687677     0            0            rounded rectangle RoundRectXSec_Radius=0.1 RoundedRect_Height=30 RoundedRect_Width=20
    3  0.980978     0            0            as above
    4  1            0            0            point

Wing "VTail"
  location (X Y Z) 126.739 0 10.8696, rotation 90 0 0
  bounding box size 38.094 3.00096 40
  totals: TotalSpan=40 TotalProjectedSpan=40 TotalChord=22.5 TotalArea=900
  root: chord 30, twist 0, NACA 4-series Camber=0 CamberLoc=0.2 ThickChord=0.1
  sections:
    n  Span  Root_Chord  Tip_Chord  Area  Sweep  Sweep_Location  Dihedral  Twist  Twist_Location  tip airfoil
    1  40    30          15         900   30     0               0         0      0.25            as above

Blank "WingSet"
  location (X Y Z) 140 0 5, rotation 0 0 0

Wing "InnerWing", child of "WingSet"
  location (X Y Z) 130 10 5, rotation 0 0 0; relative location -10 10 0, rotation 0 0 0
  symmetric about XZ
  bounding box size 25 160 2.5008
  totals: TotalSpan=140 TotalProjectedSpan=140 TotalChord=25 TotalArea=3500
  root: chord 25, twist 0, NACA 4-series Camber=0 CamberLoc=0.2 ThickChord=0.1
  sections:
    n  Span  Root_Chord  Tip_Chord  Area  Sweep  Sweep_Location  Dihedral  Twist  Twist_Location  tip airfoil
    1  70    25          25         1750  0      0               0         0      0.25            as above

Wing "OuterWing", child of "WingSet"
  location (X Y Z) 130 80 5, rotation 0 0 0; relative location -10 80 0, rotation 0 0 0
  symmetric about XZ
  bounding box size 25 200 2.5008
  totals: TotalSpan=40 TotalProjectedSpan=40 TotalChord=25 TotalArea=1000
  root: chord 25, twist 0, NACA 4-series Camber=0 CamberLoc=0.2 ThickChord=0.1
  sections:
    n  Span  Root_Chord  Tip_Chord  Area  Sweep  Sweep_Location  Dihedral  Twist  Twist_Location  tip airfoil
    1  20    25          25         500   0      0               0         0      0.25            as above

Propeller "MainProp1", child of "WingSet"
  location (X Y Z) 130 30 5, rotation 45 0 0; relative location -10 30 0, rotation 45 0 0
  symmetric about XZ
  bounding box size 1.31923 78.9343 21.7462
  Design: Diameter=25 NumBlade=3 Beta34=20 UseBeta34Flag=1 Feather=0 Rotate=0 ReverseFlag=0 FoldAngle=0 AF=152.25
  cross sections:
    n  RadiusFrac  shape
    0  0.0782609   circle Circle_Diameter=1
    1  0.45        NACA 4-series Camber=0.05 CamberLoc=0.4 Chord=2.35393 ThickChord=0.12
    2  0.7         NACA 4-series Camber=0.05 CamberLoc=0.4 Chord=2.5 ThickChord=0.05
    3  1           NACA 4-series Camber=0.01 CamberLoc=0.4 Chord=1.625 ThickChord=0.03
  Chord along r/R (cubic Bezier): 0.0782609: 0.08, 0.252174: 0.15, 0.426087: 0.2, 0.6: 0.2, 0.716667: 0.2, 0.833333: 0.2, 0.95: 0.2, 0.966667: 0.2, 0.983333: 0.2, 1: 0.13
  Twist along r/R (PCHIP): 0.0782609: 46.75, 0.75: 20, 1: 13

Propeller "MainProp2", child of "WingSet"
  location (X Y Z) 130 60 5, rotation 45 0 0; relative location -10 60 0, rotation 45 0 0
  symmetric about XZ
  bounding box size 1.31923 138.934 21.7462
  Design: Diameter=25 NumBlade=3 Beta34=20 UseBeta34Flag=1 Feather=0 Rotate=0 ReverseFlag=0 FoldAngle=0 AF=152.25
  cross sections:
    n  RadiusFrac  shape
    0  0.0782609   circle Circle_Diameter=1
    1  0.45        NACA 4-series Camber=0.05 CamberLoc=0.4 Chord=2.35393 ThickChord=0.12
    2  0.7         NACA 4-series Camber=0.05 CamberLoc=0.4 Chord=2.5 ThickChord=0.05
    3  1           NACA 4-series Camber=0.01 CamberLoc=0.4 Chord=1.625 ThickChord=0.03
  blade curves as in "MainProp1"

Propeller "MainProp3", child of "WingSet"
  location (X Y Z) 130 90 5, rotation 45 0 0; relative location -10 90 0, rotation 45 0 0
  symmetric about XZ
  bounding box size 1.31923 198.934 21.7462
  Design: Diameter=25 NumBlade=3 Beta34=20 UseBeta34Flag=1 Feather=0 Rotate=0 ReverseFlag=0 FoldAngle=0 AF=152.25
  cross sections:
    n  RadiusFrac  shape
    0  0.0782609   circle Circle_Diameter=1
    1  0.45        NACA 4-series Camber=0.05 CamberLoc=0.4 Chord=2.35393 ThickChord=0.12
    2  0.7         NACA 4-series Camber=0.05 CamberLoc=0.4 Chord=2.5 ThickChord=0.05
    3  1           NACA 4-series Camber=0.01 CamberLoc=0.4 Chord=1.625 ThickChord=0.03
  blade curves as in "MainProp1"

Blank "TailSet"
  location (X Y Z) 38 0 -5, rotation 0 0 0

Wing "HTail", child of "TailSet"
  location (X Y Z) 30 10 -5, rotation 0 0 0; relative location -8 10 0, rotation 0 0 0
  symmetric about XZ
  bounding box size 20 80 2.00064
  totals: TotalSpan=60 TotalProjectedSpan=60 TotalChord=20 TotalArea=1200
  root: chord 20, twist 0, NACA 4-series Camber=0 CamberLoc=0.2 ThickChord=0.1
  sections:
    n  Span  Root_Chord  Tip_Chord  Area  Sweep  Sweep_Location  Dihedral  Twist  Twist_Location  tip airfoil
    1  30    20          20         600   0      0               0         0      0.25            as above

Propeller "TailProp", child of "TailSet"
  location (X Y Z) 30 30 -5, rotation 45 0 0; relative location -8 30 0, rotation 45 0 0
  symmetric about XZ
  bounding box size 1.31923 78.9343 18.9342
  Design: Diameter=25 NumBlade=2 Beta34=20 UseBeta34Flag=1 Feather=0 Rotate=0 ReverseFlag=0 FoldAngle=0 AF=152.25
  cross sections:
    n  RadiusFrac  shape
    0  0.0782609   circle Circle_Diameter=1
    1  0.45        NACA 4-series Camber=0.05 CamberLoc=0.4 Chord=2.35393 ThickChord=0.12
    2  0.7         NACA 4-series Camber=0.05 CamberLoc=0.4 Chord=2.5 ThickChord=0.05
    3  1           NACA 4-series Camber=0.01 CamberLoc=0.4 Chord=1.625 ThickChord=0.03
  blade curves as in "MainProp1"
