OpenVSP model (file version 4), 7 components.
Geometry view with OpenVSP parameter names; values to 6 digits, angles in degrees, lengths in the model's unit.
Overall bounding box: X_Min=-0.209859 X_Len=1.6408 Y_Min=-1 Y_Len=2 Z_Min=-0.1 Z_Len=0.5

Fuselage "FuselageGeom"
  location (X Y Z) -0.2 0 0, rotation 0 0 0
  bounding box size 1.50986 0.2 0.2
  Design: Length=1.5
  cross sections:
    n  XLocPercent  YLocPercent  ZLocPercent  shape
    0  0            0            0            point
    1  0.0163043    0            0            rounded rectangle RoundRectXSec_Radius=0 RoundedRect_Height=0.2 RoundedRect_Width=0.2
    2  0.5          0            0            as above
    3  0.980978     0            0.0333333    rounded rectangle RoundRectXSec_Radius=0 RoundedRect_Height=0.1 RoundedRect_Width=0.1
    4  1            0            0.0333333    point

Wing "WingGeom"
  location (X Y Z) 0.1 0 0.1, rotation 0 90 0
  symmetric about XZ
  bounding box size 0.0200196 2 0.2
  totals: TotalSpan=2 TotalProjectedSpan=2 TotalChord=0.2 TotalArea=0.4
  root: chord 0.2, twist 0, NACA 4-series Camber=0 CamberLoc=0.2 ThickChord=0.1
  sections:
    n  Span  Root_Chord  Tip_Chord  Area  Sweep  Sweep_Location  Dihedral  Twist  Twist_Location  tip airfoil
    1  1     0.2         0.2        0.2   0      0               0         0      0.25            as above

Propeller "PropGeom", child of "WingGeom"
  location (X Y Z) 0.1 0.3 0.13, rotation 0 90 0; relative location -0.03 0.3 0, rotation 0 0 0
  symmetric about XZ
  bounding box size 0.233623 0.860433 0.0132844
  Design: Diameter=0.26 NumBlade=3 Beta34=20 UseBeta34Flag=1 Feather=0 Rotate=0 ReverseFlag=0 FoldAngle=0 AF=151.538
  cross sections:
    n  RadiusFrac  shape
    0  0.2         circle Circle_Diameter=0.0104
    1  0.45        NACA 4-series Camber=0.05 CamberLoc=0.4 Chord=0.0234635 ThickChord=0.12
    2  0.7         NACA 4-series Camber=0.05 CamberLoc=0.4 Chord=0.026 ThickChord=0.05
    3  1           NACA 4-series Camber=0.01 CamberLoc=0.4 Chord=0.0169 ThickChord=0.03
  Chord along r/R (cubic Bezier): 0.2: 0.08, 0.333333: 0.15, 0.466667: 0.2, 0.6: 0.2, 0.716667: 0.2, 0.833333: 0.2, 0.95: 0.2, 0.966667: 0.2, 0.983333: 0.2, 1: 0.13
  Twist along r/R (PCHIP): 0.2: 46.75, 0.75: 20, 1: 13

Propeller "PropGeom", child of "WingGeom"
  location (X Y Z) 0.1 0.7 0.13, rotation 0 90 0; relative location -0.03 0.7 0, rotation 0 0 0
  symmetric about XZ
  bounding box size 0.233623 1.66043 0.0132844
  Design: Diameter=0.26 NumBlade=3 Beta34=20 UseBeta34Flag=1 Feather=0 Rotate=0 ReverseFlag=0 FoldAngle=0 AF=151.538
  cross sections:
    n  RadiusFrac  shape
    0  0.2         circle Circle_Diameter=0.0104
    1  0.45        NACA 4-series Camber=0.05 CamberLoc=0.4 Chord=0.0234635 ThickChord=0.12
    2  0.7         NACA 4-series Camber=0.05 CamberLoc=0.4 Chord=0.026 ThickChord=0.05
    3  1           NACA 4-series Camber=0.01 CamberLoc=0.4 Chord=0.0169 ThickChord=0.03
  blade curves as in "PropGeom"

Wing "WingGeom"
  location (X Y Z) 1.2 0 0.15, rotation 0 90 0
  symmetric about XZ
  bounding box size 0.0200196 1 0.2
  totals: TotalSpan=1 TotalProjectedSpan=1 TotalChord=0.2 TotalArea=0.2
  root: chord 0.2, twist 0, NACA 4-series Camber=0 CamberLoc=0.2 ThickChord=0.1
  sections:
    n  Span  Root_Chord  Tip_Chord  Area  Sweep  Sweep_Location  Dihedral  Twist  Twist_Location  tip airfoil
    1  0.5   0.2         0.2        0.1   0      0               0         0      0.25            as above

Propeller "PropGeom", child of "WingGeom"
  location (X Y Z) 1.2 0.3 0.18, rotation 0 90 0; relative location -0.03 0.3 0, rotation 0 0 0
  symmetric about XZ
  bounding box size 0.233623 0.860433 0.0132844
  Design: Diameter=0.26 NumBlade=3 Beta34=20 UseBeta34Flag=1 Feather=0 Rotate=0 ReverseFlag=0 FoldAngle=0 AF=151.538
  cross sections:
    n  RadiusFrac  shape
    0  0.2         circle Circle_Diameter=0.0104
    1  0.45        NACA 4-series Camber=0.05 CamberLoc=0.4 Chord=0.0234635 ThickChord=0.12
    2  0.7         NACA 4-series Camber=0.05 CamberLoc=0.4 Chord=0.026 ThickChord=0.05
    3  1           NACA 4-series Camber=0.01 CamberLoc=0.4 Chord=0.0169 ThickChord=0.03
  blade curves as in "PropGeom"

Wing "WingGeom"
  location (X Y Z) 1.1 0 0, rotation 90 0 0
  bounding box size 0.33094 0.0250245 0.4
  totals: TotalSpan=0.4 TotalProjectedSpan=0.4 TotalChord=0.175 TotalArea=0.07
  root: chord 0.25, twist 0, NACA 4-series Camber=0 CamberLoc=0.2 ThickChord=0.1
  sections:
    n  Span  Root_Chord  Tip_Chord  Area  Sweep  Sweep_Location  Dihedral  Twist  Twist_Location  tip airfoil
    1  0.4   0.25        0.1        0.07  30     0               0         0      0.25            as above
